// SBML level 2 version 4

function Constant_flux_irreversible(v)
  v;
end
Constant_flux_irreversible is "Constant flux (irreversible)";

function function_4_reaction_1_1(Akt, Akt_S473_phos_by_insulin, Insulin)
  Akt_S473_phos_by_insulin*Akt*Insulin;
end

function function_4_reaction_2_1(Akt_pS473, Akt_pS473_dephos_by_mTORC1_pS2448, mTORC1_pS2448)
  Akt_pS473_dephos_by_mTORC1_pS2448*Akt_pS473*mTORC1_pS2448;
end

function function_4_reaction_4_1(AMPK_pT172, AMPK_pT172_dephos_by_Mito_membr_pot_new, Mito_membr_pot_new)
  AMPK_pT172_dephos_by_Mito_membr_pot_new*AMPK_pT172*Mito_membr_pot_new;
end

function function_4_reaction_5_1(AMPK_pT172, AMPK_pT172_dephos_by_Mito_membr_pot_old, Mito_membr_pot_old)
  AMPK_pT172_dephos_by_Mito_membr_pot_old*AMPK_pT172*Mito_membr_pot_old;
end

function function_4_reaction_6_1(Amino_Acids, mTORC1, mTORC1_S2448_phos_by_AA)
  mTORC1_S2448_phos_by_AA*mTORC1*Amino_Acids;
end

function function_4_reaction_7_1(Akt_pS473, Amino_Acids, mTORC1, mTORC1_S2448_phos_by_AA_n_Akt_pS473)
  mTORC1_S2448_phos_by_AA_n_Akt_pS473*mTORC1*Amino_Acids*Akt_pS473;
end

function function_4_reaction_8_1(AMPK_pT172, mTORC1_pS2448, mTORC1_pS2448_dephos_by_AMPK_pT172)
  mTORC1_pS2448_dephos_by_AMPK_pT172*mTORC1_pS2448*AMPK_pT172;
end

function function_4_reaction_9_1(AMPK_pT172, FoxO3a, mitophagy_activ_by_FoxO3a_n_AMPK_pT172)
  mitophagy_activ_by_FoxO3a_n_AMPK_pT172*FoxO3a*AMPK_pT172;
end

function function_4_reaction_10_1(Mitophagy, mTORC1_pS2448, mitophagy_inactiv_by_mTORC1_pS2448)
  mitophagy_inactiv_by_mTORC1_pS2448*Mitophagy*mTORC1_pS2448;
end

function function_4_reaction_11_1(Akt_pS473, FoxO3a, FoxO3a_phos_by_Akt_pS473)
  FoxO3a_phos_by_Akt_pS473*FoxO3a*Akt_pS473;
end

function function_4_reaction_12_1(FoxO3a_pS253, FoxO3a_phos_by_JNK_pT183, JNK_pT183)
  FoxO3a_phos_by_JNK_pT183*FoxO3a_pS253*JNK_pT183;
end

function function_4_reaction_15_1(CDKN1A_transcr_by_FoxO3a_n_DNA_damage, DNA_damage, FoxO3a)
  CDKN1A_transcr_by_FoxO3a_n_DNA_damage*DNA_damage*FoxO3a;
end

function function_4_reaction_16_1(Akt_pS473, CDKN1A, CDKN1A_inactiv_by_Akt_pS473)
  CDKN1A_inactiv_by_Akt_pS473*CDKN1A*Akt_pS473;
end

function function_4_reaction_17_1(CDKN1B_transcr_by_FoxO3a_n_DNA_damage, DNA_damage, FoxO3a)
  CDKN1B_transcr_by_FoxO3a_n_DNA_damage*DNA_damage*FoxO3a;
end

function function_4_reaction_18_1(Akt_pS473, CDKN1B, CDKN1B_inactiv_by_Akt_pS473)
  CDKN1B_inactiv_by_Akt_pS473*CDKN1B*Akt_pS473;
end

function function_4_reaction_19_1(DNA_damaged_by_irradiation, Irradiation)
  DNA_damaged_by_irradiation*Irradiation;
end

function function_4_reaction_20_1(DNA_damaged_by_ROS, ROS)
  DNA_damaged_by_ROS*ROS;
end

function function_4_reaction_22_1(Mito_membr_pot_new, ROS_prod_by_Mito_membr_pot_new)
  ROS_prod_by_Mito_membr_pot_new*Mito_membr_pot_new;
end

function function_4_reaction_23_1(Mito_membr_pot_old, ROS_prod_by_Mito_membr_pot_old)
  ROS_prod_by_Mito_membr_pot_old*Mito_membr_pot_old;
end

function function_4_reaction_25_1(JNK, JNK_activ_by_ROS, ROS)
  JNK_activ_by_ROS*JNK*ROS;
end

function function_4_reaction_27_1(ROS, sen_ass_beta_gal_inc_by_ROS)
  sen_ass_beta_gal_inc_by_ROS*ROS;
end

function function_4_reaction_28_1(Mitophagy, sen_ass_beta_gal_inc_by_Mitophagy)
  sen_ass_beta_gal_inc_by_Mitophagy*Mitophagy;
end

function function_4_reaction_30_1(Mito_mass_turnover, mTORC1_pS2448, mito_biogenesis_by_mTORC1_pS2448)
  mito_biogenesis_by_mTORC1_pS2448*Mito_mass_turnover*mTORC1_pS2448;
end

function function_4_reaction_31_1(Mito_mass_turnover, mTORC1_pS2448, mito_biogenesis_by_AMPK_pT172)
  mito_biogenesis_by_AMPK_pT172*Mito_mass_turnover*mTORC1_pS2448;
end

function function_4_reaction_32_1(Mito_mass_new, Mitophagy, mitophagy_new)
  mitophagy_new*Mito_mass_new*Mitophagy;
end

function function_4_reaction_33_1(Mito_mass_old, Mitophagy, mitophagy_old)
  mitophagy_old*Mito_mass_old*Mitophagy;
end

function function_4_reaction_34_1(CDKN1A, Mito_mass_new, mito_dysfunction)
  mito_dysfunction*Mito_mass_new*CDKN1A;
end

function function_4_reaction_35_1(Mito_mass_new, mito_membr_pot_new_inc)
  mito_membr_pot_new_inc*Mito_mass_new;
end

function function_4_reaction_36_1(Mito_mass_old, mito_membr_pot_old_inc)
  mito_membr_pot_old_inc*Mito_mass_old;
end

function function_4_reaction_39_1(IKKbeta_activ_by_ROS, ROS)
  IKKbeta_activ_by_ROS*ROS;
end

function function_4_reaction_41_1(Amino_Acids, IKKbeta, mTORC1, mTORC1_S2448_phos_by_AA_n_IKKbeta)
  mTORC1_S2448_phos_by_AA_n_IKKbeta*mTORC1*Amino_Acids*IKKbeta;
end

model MODEL1506230000()
  // DallePezze2014 - Cellular senescene-induced mitochondrial dysfunction
  // DallePazze2014 - Cellular senescene-induced mitochondrial dysfunction
  // This model is described in the article:
  // Dynamic modelling of pathways to cellular senescence reveals strategies for targeted interventions.
  // Dalle Pezze P, Nelson G, Otten EG, Korolchuk VI, Kirkwood TB, von Zglinicki T, Shanley DP.
  // PLoS Comput. Biol. 2014 Aug; 10(8): e1003728
  // Abstract:
  // Cellular senescence, a state of irreversible cell cycle arrest, is thought to help protect an organism from cancer, yet also contributes to ageing. The changes which occur in senescence are controlled by networks of multiple signalling and feedback pathways at the cellular level, and the interplay between these is difficult to predict and understand. To unravel the intrinsic challenges of understanding such a highly networked system, we have taken a systems biology approach to cellular senescence. We report a detailed analysis of senescence signalling via DNA damage, insulin-TOR, FoxO3a transcription factors, oxidative stress response, mitochondrial regulation and mitophagy. We show in silico and in vitro that inhibition of reactive oxygen species can prevent loss of mitochondrial membrane potential, whilst inhibition of mTOR shows a partial rescue of mitochondrial mass changes during establishment of senescence. Dual inhibition of ROS and mTOR in vitro confirmed computational model predictions that it was possible to further reduce senescence-induced mitochondrial dysfunction and DNA double-strand breaks. However, these interventions were unable to abrogate the senescence-induced mitochondrial dysfunction completely, and we identified decreased mitochondrial fission as the potential driving force for increased mitochondrial mass via prevention of mitophagy. Dynamic sensitivity analysis of the model showed the network stabilised at a new late state of cellular senescence. This was characterised by poor network sensitivity, high signalling noise, low cellular energy, high inflammation and permanent cell cycle arrest suggesting an unsatisfactory outcome for treatments aiming to delay or reverse cellular senescence at late time points. Combinatorial targeted interventions are therefore possible for intervening in the cellular pathway to senescence, but in the cases identified here, are only capable of delaying senescence onset.
  // This model is hosted on BioModels Database and identified by: BIOMD0000000582.
  // To cite BioModels Database, please use: BioModels Database: An enhanced, curated and annotated resource for published quantitative kinetic models.
  // To the extent possible under law, all copyright and related or neighbouring rights to this encoded model have been dedicated to the public domain worldwide. Please refer to CC0 Public Domain Dedication for more information.
  // biomodels.db:MODEL1506230000
  // biomodels.db:BIOMD0000000582
  // isDescribedBy pubmed:25166345
  // isVersionOf GO:2000772 GO:0032869
  // hasTaxon taxonomy:9606
  // occursIn BTO:0001590

  // Compartments:
  compartment Cell = 1;

  // Species:
  species Akt in Cell = 10;  // isVersionOf uniprot:P31749
  species Akt_pS473 in Cell = 10;  // isVersionOf uniprot:P31749
  species AMPK in Cell = 10;  // hasPart uniprot:Q9Y478 uniprot:P54646
  species AMPK_pT172 in Cell = 10;  // hasPart uniprot:Q9Y478 uniprot:P54646
  species mTORC1 in Cell = 10;  // isVersionOf GO:0031931
  species mTORC1_pS2448 in Cell = 10;  // isVersionOf GO:0031931
  species Mitophagy in Cell = 10;  // hasProperty GO:0000422
  species FoxO3a in Cell = 10;  // isVersionOf uniprot:O43524
  species FoxO3a_pS253 in Cell = 10;  // isVersionOf uniprot:O43524
  species CDKN1A in Cell = 10;  // hasVersion uniprot:P38936
  species CDKN1B in Cell = 10;  // isVersionOf uniprot:Q6I9V6
  species JNK in Cell = 25;  // isVersionOf uniprot:P45983
  species JNK_pT183 in Cell = 10;  // isVersionOf uniprot:P45983
  species ROS in Cell = 10;  // CHEBI:26523
  species DNA_damage in Cell = 1;  // isVersionOf CHEBI:16991
  species SA_beta_gal in Cell = 0.81;  // isVersionOf uniprot:P16278
  species IKKbeta in Cell = 10;  // isVersionOf uniprot:O14920
  species Mito_mass_new in Cell = 1;  // isVersionOf GO:0005739
  species Mito_mass_old in Cell = 0;  // isVersionOf GO:0005739
  species Mito_mass_turnover in Cell = 25;  // isVersionOf GO:0005739
  species Mito_membr_pot_new in Cell = 12.12;  // isVersionOf GO:0005739
  species Mito_membr_pot_old in Cell = 0;  // isVersionOf GO:0005739
  species Nil in Cell = 0;
  species $Insulin in Cell;  // CHEBI:5931
  species $Amino_Acids in Cell;  // isVersionOf CHEBI:33709
  species $Irradiation in Cell;
  species $DNA_damage_gammaH2AX_obs in Cell;
  species $Akt_pS473_obs in Cell;
  species $mTOR_pS2448_obs in Cell;
  species $AMPK_pT172_obs in Cell;
  species $CDKN1A_obs in Cell;
  species $CDKN1B_obs in Cell;
  species $FoxO3a_pS253_obs in Cell;
  species $FoxO3a_total_obs in Cell;
  species $Mito_Mass_obs in Cell;
  species $Mito_Membr_Pot_obs in Cell;
  species $Mitophagy_obs in Cell;
  species $ROS_obs in Cell;
  species $JNK_pT183_obs in Cell;
  species $SA_beta_gal_obs in Cell;

  // Parameters:
  Akt_S473_phos_by_insulin = 0.5887831;
  Akt_pS473_dephos_by_mTORC1_pS2448 = 0.1145982;
  AMPK_T172_phos = 0.355184;
  AMPK_pT172_dephos_by_Mito_membr_pot_new = 0.1177447;
  AMPK_pT172_dephos_by_Mito_membr_pot_old = 1e-6;
  mTORC1_S2448_phos_by_AA = 1.00009e-6;
  mTORC1_S2448_phos_by_AA_n_Akt_pS473 = 162.471;
  mTORC1_pS2448_dephos_by_AMPK_pT172 = 191.2973;
  mitophagy_activ_by_FoxO3a_n_AMPK_pT172 = 1319.842;
  mitophagy_inactiv_by_mTORC1_pS2448 = 645.9993;
  FoxO3a_phos_by_Akt_pS473 = 6.835111;
  FoxO3a_phos_by_JNK_pT183 = 0.1128776;
  FoxO3a_pS253_degrad = 39.40686;
  FoxO3a_synthesis = 407.3074;
  CDKN1A_transcr_by_FoxO3a_n_DNA_damage = 0.08521823;
  CDKN1A_inactiv_by_Akt_pS473 = 0.06679711;
  CDKN1B_transcr_by_FoxO3a_n_DNA_damage = 0.09205266;
  CDKN1B_inactiv_by_Akt_pS473 = 0.05968416;
  DNA_damaged_by_irradiation = 9237.723;
  DNA_repair = 0.3257248;
  DNA_damaged_by_ROS = 0.1188737;
  ROS_prod_by_Mito_membr_pot_new = 4.554648;
  ROS_prod_by_Mito_membr_pot_old = 772.8295;
  ROS_turnover = 3.230823;
  JNK_activ_by_ROS = 0.005023292;
  JNK_pT183_inactiv = 0.07184292;
  IKKbeta_activ_by_ROS = 1;
  IKKbeta_inactiv = 1;
  mTORC1_S2448_phos_by_AA_n_IKKbeta = 1.00009e-5;
  sen_ass_beta_gal_inc_by_ROS = 0.070114;
  sen_ass_beta_gal_inc_by_Mitophagy = 1e-6;
  sen_ass_beta_gal_dec = 0.1548212;
  mito_biogenesis_by_mTORC1_pS2448 = 0.01336201;
  mito_biogenesis_by_AMPK_pT172 = 5.891546e-5;
  mitophagy_new = 0.2246599;
  mitophagy_old = 0.001226076;
  mito_dysfunction = 0.02706953;
  mito_membr_pot_new_inc = 9882.027;
  mito_membr_pot_old_inc = 0.005860179;
  mito_membr_pot_new_dec = 1094.584;
  mito_membr_pot_old_dec = 0.9549035;
  scale_Akt_pS473_obs = 1;
  scale_FoxO3a_pS253_obs = 1;
  scale_FoxO3a_total_obs = 1;
  scale_AMPK_pT172_obs = 1;
  scale_mTOR_pS2448_obs = 1;
  scale_Mitophagy_obs = 1;
  scale_Mito_Mass_obs = 1;
  scale_Mito_Membr_Pot_obs = 1;
  scale_CDKN1A_obs = 1;
  scale_CDKN1B_obs = 1;
  scale_ROS_obs = 1;
  scale_DNA_damage_gammaH2AX_obs = 1;
  scale_JNK_pT183_obs = 1;
  scale_SA_beta_gal_obs = 1;

  // Assignment rules:
  DNA_damage_gammaH2AX_obs := scale_DNA_damage_gammaH2AX_obs*DNA_damage;
  Insulin := piecewise(1, time < -1, piecewise(1, time < 0, 1));
  Amino_Acids := piecewise(1, time < -1, piecewise(1, time < 0, 1));
  Irradiation := piecewise(0, time < -1, piecewise(0, time < 0, piecewise(1, time < 0.003472, 0)));
  Akt_pS473_obs := scale_Akt_pS473_obs*Akt_pS473;
  SA_beta_gal_obs := scale_SA_beta_gal_obs*SA_beta_gal;
  JNK_pT183_obs := scale_JNK_pT183_obs*JNK_pT183;
  ROS_obs := scale_ROS_obs*ROS;
  FoxO3a_total_obs := scale_FoxO3a_total_obs*(FoxO3a + FoxO3a_pS253);
  Mitophagy_obs := scale_Mitophagy_obs*Mitophagy;
  Mito_Membr_Pot_obs := scale_Mito_Membr_Pot_obs*(Mito_membr_pot_new + Mito_membr_pot_old);
  CDKN1B_obs := scale_CDKN1B_obs*CDKN1B;
  CDKN1A_obs := scale_CDKN1A_obs*CDKN1A;
  Mito_Mass_obs := scale_Mito_Mass_obs*(Mito_mass_new + Mito_mass_old);
  AMPK_pT172_obs := scale_AMPK_pT172_obs*AMPK_pT172;
  FoxO3a_pS253_obs := scale_FoxO3a_pS253_obs*FoxO3a_pS253;
  mTOR_pS2448_obs := scale_mTOR_pS2448_obs*mTORC1_pS2448;

  // Reactions:
  reaction_1: Akt => Akt_pS473; Cell*function_4_reaction_1_1(Akt, Akt_S473_phos_by_insulin, Insulin);  // modifiers: Insulin
  reaction_2: Akt_pS473 => Akt; Cell*function_4_reaction_2_1(Akt_pS473, Akt_pS473_dephos_by_mTORC1_pS2448, mTORC1_pS2448);  // modifiers: mTORC1_pS2448
  reaction_3: AMPK => AMPK_pT172; Cell*AMPK_T172_phos*AMPK;
  reaction_4: AMPK_pT172 => AMPK; Cell*function_4_reaction_4_1(AMPK_pT172, AMPK_pT172_dephos_by_Mito_membr_pot_new, Mito_membr_pot_new);  // modifiers: Mito_membr_pot_new
  reaction_5: AMPK_pT172 => AMPK; Cell*function_4_reaction_5_1(AMPK_pT172, AMPK_pT172_dephos_by_Mito_membr_pot_old, Mito_membr_pot_old);  // modifiers: Mito_membr_pot_old
  reaction_6: mTORC1 => mTORC1_pS2448; Cell*function_4_reaction_6_1(Amino_Acids, mTORC1, mTORC1_S2448_phos_by_AA);  // modifiers: Amino_Acids
  reaction_7: mTORC1 => mTORC1_pS2448; Cell*function_4_reaction_7_1(Akt_pS473, Amino_Acids, mTORC1, mTORC1_S2448_phos_by_AA_n_Akt_pS473);  // modifiers: Amino_Acids, Akt_pS473
  reaction_8: mTORC1_pS2448 => mTORC1; Cell*function_4_reaction_8_1(AMPK_pT172, mTORC1_pS2448, mTORC1_pS2448_dephos_by_AMPK_pT172);  // modifiers: AMPK_pT172
  reaction_9: => Mitophagy; Cell*function_4_reaction_9_1(AMPK_pT172, FoxO3a, mitophagy_activ_by_FoxO3a_n_AMPK_pT172);  // modifiers: FoxO3a, AMPK_pT172
  reaction_10: Mitophagy => Nil; Cell*function_4_reaction_10_1(Mitophagy, mTORC1_pS2448, mitophagy_inactiv_by_mTORC1_pS2448);  // modifiers: mTORC1_pS2448
  reaction_11: FoxO3a => FoxO3a_pS253; Cell*function_4_reaction_11_1(Akt_pS473, FoxO3a, FoxO3a_phos_by_Akt_pS473);  // modifiers: Akt_pS473
  reaction_12: FoxO3a_pS253 => FoxO3a; Cell*function_4_reaction_12_1(FoxO3a_pS253, FoxO3a_phos_by_JNK_pT183, JNK_pT183);  // modifiers: JNK_pT183
  reaction_13: FoxO3a_pS253 => Nil; Cell*FoxO3a_pS253_degrad*FoxO3a_pS253;
  reaction_14: => FoxO3a; Cell*Constant_flux_irreversible(FoxO3a_synthesis);
  reaction_15: => CDKN1A; Cell*function_4_reaction_15_1(CDKN1A_transcr_by_FoxO3a_n_DNA_damage, DNA_damage, FoxO3a);  // modifiers: DNA_damage, FoxO3a
  reaction_16: CDKN1A => Nil; Cell*function_4_reaction_16_1(Akt_pS473, CDKN1A, CDKN1A_inactiv_by_Akt_pS473);  // modifiers: Akt_pS473
  reaction_17: => CDKN1B; Cell*function_4_reaction_17_1(CDKN1B_transcr_by_FoxO3a_n_DNA_damage, DNA_damage, FoxO3a);  // modifiers: DNA_damage, FoxO3a
  reaction_18: CDKN1B => Nil; Cell*function_4_reaction_18_1(Akt_pS473, CDKN1B, CDKN1B_inactiv_by_Akt_pS473);  // modifiers: Akt_pS473
  reaction_19: => DNA_damage; Cell*function_4_reaction_19_1(DNA_damaged_by_irradiation, Irradiation);  // modifiers: Irradiation
  reaction_20: => DNA_damage; Cell*function_4_reaction_20_1(DNA_damaged_by_ROS, ROS);  // modifiers: ROS
  reaction_21: DNA_damage => Nil; Cell*DNA_repair*DNA_damage;
  reaction_22: => ROS; Cell*function_4_reaction_22_1(Mito_membr_pot_new, ROS_prod_by_Mito_membr_pot_new);  // modifiers: Mito_membr_pot_new
  reaction_23: => ROS; Cell*function_4_reaction_23_1(Mito_membr_pot_old, ROS_prod_by_Mito_membr_pot_old);  // modifiers: Mito_membr_pot_old
  reaction_24: ROS => Nil; Cell*ROS_turnover*ROS;
  reaction_25: JNK => JNK_pT183; Cell*function_4_reaction_25_1(JNK, JNK_activ_by_ROS, ROS);  // modifiers: ROS
  reaction_26: JNK_pT183 => JNK; Cell*JNK_pT183_inactiv*JNK_pT183;
  reaction_27: => SA_beta_gal; Cell*function_4_reaction_27_1(ROS, sen_ass_beta_gal_inc_by_ROS);  // modifiers: ROS
  reaction_28: => SA_beta_gal; Cell*function_4_reaction_28_1(Mitophagy, sen_ass_beta_gal_inc_by_Mitophagy);  // modifiers: Mitophagy
  reaction_29: SA_beta_gal => ; Cell*sen_ass_beta_gal_dec*SA_beta_gal;
  reaction_30: Mito_mass_turnover => Mito_mass_new; Cell*function_4_reaction_30_1(Mito_mass_turnover, mTORC1_pS2448, mito_biogenesis_by_mTORC1_pS2448);  // modifiers: mTORC1_pS2448
  reaction_31: Mito_mass_turnover => Mito_mass_new; Cell*function_4_reaction_31_1(Mito_mass_turnover, mTORC1_pS2448, mito_biogenesis_by_AMPK_pT172);  // modifiers: mTORC1_pS2448
  reaction_32: Mito_mass_new => Mito_mass_turnover; Cell*function_4_reaction_32_1(Mito_mass_new, Mitophagy, mitophagy_new);  // modifiers: Mitophagy
  reaction_33: Mito_mass_old => Mito_mass_turnover; Cell*function_4_reaction_33_1(Mito_mass_old, Mitophagy, mitophagy_old);  // modifiers: Mitophagy
  reaction_34: Mito_mass_new => Mito_mass_old; Cell*function_4_reaction_34_1(CDKN1A, Mito_mass_new, mito_dysfunction);  // modifiers: CDKN1A
  reaction_35: => Mito_membr_pot_new; Cell*function_4_reaction_35_1(Mito_mass_new, mito_membr_pot_new_inc);  // modifiers: Mito_mass_new
  reaction_36: => Mito_membr_pot_old; Cell*function_4_reaction_36_1(Mito_mass_old, mito_membr_pot_old_inc);  // modifiers: Mito_mass_old
  reaction_37: Mito_membr_pot_new => Nil; Cell*mito_membr_pot_new_dec*Mito_membr_pot_new;
  reaction_38: Mito_membr_pot_old => Nil; Cell*mito_membr_pot_old_dec*Mito_membr_pot_old;
  reaction_39: => IKKbeta; Cell*function_4_reaction_39_1(IKKbeta_activ_by_ROS, ROS);  // modifiers: ROS
  reaction_40: IKKbeta => Nil; Cell*IKKbeta_inactiv*IKKbeta;
  reaction_41: mTORC1 => mTORC1_pS2448; Cell*function_4_reaction_41_1(Amino_Acids, IKKbeta, mTORC1, mTORC1_S2448_phos_by_AA_n_IKKbeta);  // modifiers: Amino_Acids, IKKbeta

  // Unit definitions:
  unit time = 86400 second;
  unit substance = dimensionless;
  unit volume = dimensionless;
end
